*Heading
** Job name: OR-AND-Gate-paremetrical-4 Model name: OR-AND-GATE-h15e-01-t9e-01
** Generated by: Abaqus/CAE 2019
*Preprint, echo=NO, model=NO, history=NO, contact=NO
**
** PARTS
**
*Part, name=PART-1
*Node
 581033,       -21.25,  -1.88636363,           5.
 581034,       -21.25,  -1.71306813,           5.
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*Element, type=C3D8R
400000, 600069, 600064, 600067, 600070, 601801, 601796, 601799, 601802
400001, 600068, 600069, 600070, 600071, 601800, 601801, 601802, 601803
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*Elset, elset=GATE, generate
 400000,  414731,       1
*Elset, elset=LEFT-BLOCK
 413560, 413561, 413562, 413565, 413569, 413570
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*Elset, elset=RIGHT-BLOCK
 413563, 413564, 413566, 413567, 413568, 413571
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** Section: Section-1-GATE
*Solid Section, elset=GATE, controls=EC-1, material=TPU
,
*End Part
**
*Part, name=PART-2
*Node
  12838,  -20.0065365,  -1.01999998,           0.
  12839,  -20.0065365,           0.,           0.
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*Element, type=C3D8R
11000000, 12841, 12840, 12839, 12855, 15592, 15595, 15594, 15593
11000001, 12855, 12839, 12838, 12853, 15593, 15594, 15597, 15596
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*Elset, elset=BASE, generate
11000000, 11013019,       1
** Section: Section-2-BASE
*Solid Section, elset=BASE, material=BASE
,
*End Part
**
*Part, name=PART-3
*Node
*Element, type=C3D8R
*Elset, elset=ARC, generate
    1,  2000,     1
** Section: Section-3-ARC
*Solid Section, elset=ARC, controls=EC-1, material=TPU
,
*End Part
**
*Part, name=PART-4
*Node
*Element, type=C3D8R
*Elset, elset=COLUMN, generate
 2001,  2360,     1
** Section: Section-4-COLUMN
*Solid Section, elset=COLUMN, controls=EC-1, material=TPU
,
*End Part
**
**
** ASSEMBLY
**
*Assembly, name=Assembly
**
*Instance, name=PART-1-1, part=PART-1
*End Instance
**
*Instance, name=PART-2-1, part=PART-2
*End Instance
**
*Instance, name=PART-3-1, part=PART-3
*End Instance
**
*Instance, name=PART-4-1, part=PART-4
*End Instance
**
*Node
      1,           0.,           0.,          -5.
      2,       -24.75,           0.,          2.5
      3,        24.75,           0.,          2.5
      4,         -20.,           0.,          -2.
      5,          20.,           0.,          -2.
*Nset, nset=BASE-RP
 1,
*Nset, nset=LEFT-RP
 2,
*Nset, nset=LEFTB-RP
 4,
*Nset, nset=RIGHT-RP
 3,
*Nset, nset=RIGHTB-RP
 5,
*Elset, elset=_BASE-FIXER_S3, internal, instance=PART-2-1
11000471,11000473,11000550,11000552,11000554,11000704
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*Elset, elset=_BASE-FIXER_S4, internal, instance=PART-2-1
11000730,11000731,11003318,11003319,11005906,11005907,11008494,11008495,11011082,11011083
*Elset, elset=_BASE-FIXER_S5, internal, instance=PART-2-1
11000355,11000357,11000359,11000443,11000445,11000447
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*Elset, elset=_BASE-FIXER_S6, internal, instance=PART-2-1
11000112,11000114,11000116,11000212,11000214,11000216
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*Elset, elset=_FIXER-BASE_S3, internal, instance=PART-1-1
 413803, 413806, 413808, 413841, 413852, 413861
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*Elset, elset=_FIXER-BASE_S4, internal, instance=PART-1-1
 413753, 413757, 413762, 413766, 413769, 413770
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*Elset, elset=_GATE-COLUMN_S6, internal, instance=PART-1-1
 400880, 400881, 402236, 402237, 403592, 403593
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*Elset, elset=_LEFT-IN_S4, internal, instance=PART-1-1
 400262, 400263, 401618, 401619, 402974, 402975
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*Nset, nset=_PickedSet42, internal
 1,
*Nset, nset=_PickedSet43, internal
 4,
*Nset, nset=_PickedSet44, internal
 5,
*Elset, elset=_RIGHT-IN_S4, internal, instance=PART-1-1
 400195, 400200, 401551, 401556, 402907, 402912
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*Elset, elset=_ARC-COLUMN_S5, internal, instance=PART-3-1
  147,  148,  149,  150,  151,  152
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*Surface, type=ELEMENT, name=ARC-COLUMN
_ARC-COLUMN_S5, S5
*Elset, elset=_ARC-GATE_S4, internal, instance=PART-3-1, generate
  100,  2000,   100
*Elset, elset=_ARC-GATE_S6, internal, instance=PART-3-1, generate
    1,  1901,   100
*Surface, type=ELEMENT, name=ARC-GATE
_ARC-GATE_S4, S4
_ARC-GATE_S6, S6
*Elset, elset=_BASE-FIXER_S3_1, internal, instance=PART-2-1
11000471,11000473,11000550,11000552,11000554,11000704
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*Elset, elset=_BASE-FIXER_S4_1, internal, instance=PART-2-1
11000730,11000731,11003318,11003319,11005906,11005907,11008494,11008495,11011082,11011083
*Elset, elset=_BASE-FIXER_S6_1, internal, instance=PART-2-1
11000112,11000114,11000116,11000212,11000214,11000216
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*Elset, elset=_BASE-FIXER_S5_1, internal, instance=PART-2-1
11000355,11000357,11000359,11000443,11000445,11000447
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*Surface, type=ELEMENT, name=BASE-FIXER
_BASE-FIXER_S3_1, S3
_BASE-FIXER_S4_1, S4
_BASE-FIXER_S6_1, S6
_BASE-FIXER_S5_1, S5
*Elset, elset=_COLUMN-ARC_S3, internal, instance=PART-4-1
 2001, 2002, 2003, 2073, 2074, 2075, 2145, 2146, 2147, 2217, 2218, 2219, 2289, 2290, 2291
*Surface, type=ELEMENT, name=COLUMN-ARC
_COLUMN-ARC_S3, S3
*Elset, elset=_COLUMN-GATE_S5, internal, instance=PART-4-1
 2070, 2071, 2072, 2142, 2143, 2144, 2214, 2215, 2216, 2286, 2287, 2288, 2358, 2359, 2360
*Surface, type=ELEMENT, name=COLUMN-GATE
_COLUMN-GATE_S5, S5
*Elset, elset=_FIXER-BASE_S3_1, internal, instance=PART-1-1
 413803, 413806, 413808, 413841, 413852, 413861
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*Elset, elset=_FIXER-BASE_S4_1, internal, instance=PART-1-1
 413753, 413757, 413762, 413766, 413769, 413770
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*Elset, elset=_FIXER-BASE_S6_1, internal, instance=PART-1-1
 413758, 413782, 413788, 413789, 413792, 413794
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*Elset, elset=_FIXER-BASE_S5_1, internal, instance=PART-1-1
 413756, 413766, 413768, 413773, 413784, 413786
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*Surface, type=ELEMENT, name=FIXER-BASE
_FIXER-BASE_S3_1, S3
_FIXER-BASE_S4_1, S4
_FIXER-BASE_S6_1, S6
_FIXER-BASE_S5_1, S5
*Elset, elset=_GATE-ARC_S3_1, internal, instance=PART-1-1
 400242, 400243, 400244, 400245, 401598, 401599
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*Elset, elset=_GATE-ARC_S4_1, internal, instance=PART-1-1
 400197, 400199, 400202, 400203, 401553, 401555
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*Surface, type=ELEMENT, name=GATE-ARC
_GATE-ARC_S3_1, S3
_GATE-ARC_S4_1, S4
*Surface, type=ELEMENT, name=GATE-COLUMN
_GATE-COLUMN_S6, S6
*Surface, type=ELEMENT, name=LEFT-IN
_LEFT-IN_S4, S4
*Surface, type=ELEMENT, name=RIGHT-IN
_RIGHT-IN_S4, S4
** Constraint: COUPLING-1
*Coupling, constraint name=COUPLING-1, ref node=LEFT-RP, surface=LEFT-IN
*Kinematic
** Constraint: COUPLING-2
*Coupling, constraint name=COUPLING-2, ref node=RIGHT-RP, surface=RIGHT-IN
*Kinematic
** Constraint: RigidBody-1
*Rigid Body, ref node=_PickedSet42, elset=PART-2-1.BASE
** Constraint: RigidBody-2
*Rigid Body, ref node=_PickedSet43, elset=PART-1-1.LEFT-BLOCK
** Constraint: RigidBody-3
*Rigid Body, ref node=_PickedSet44, elset=PART-1-1.RIGHT-BLOCK
** Constraint: TIE-1-1
*Tie, name=TIE-1-1, adjust=yes
FIXER-BASE, BASE-FIXER
** Constraint: TIE-2-1
*Tie, name=TIE-2-1, adjust=yes
ARC-GATE, GATE-ARC
** Constraint: TIE-3-1
*Tie, name=TIE-3-1, adjust=yes
GATE-COLUMN, COLUMN-GATE
** Constraint: TIE-4-1
*Tie, name=TIE-4-1, adjust=yes
COLUMN-ARC, ARC-COLUMN
*End Assembly
**
** ELEMENT CONTROLS
**
*Section Controls, name=EC-1, hourglass=ENHANCED
1., 1., 1.
*Amplitude, name=AMP-1
             0.,              0.,             0.5,              1.
**
** MATERIALS
**
*Material, name=BASE
*Density
 2.7e-09,
*Elastic
72000., 0.31
*Material, name=TPU
*Density
 1.22e-09,
*Elastic
 0.5, 0.3
**
** INTERACTION PROPERTIES
**
*Surface Interaction, name=INTPROP-1
*Friction
0.,
*Surface Behavior, pressure-overclosure=HARD
**
** INTERACTIONS
**
** Interaction: general_contact
*Contact, op=NEW
*Contact Inclusions, ALL EXTERIOR
*Contact Property Assignment
 ,  , INTPROP-1
** ----------------------------------------------------------------
**
** STEP: Step-1
**
*Step, name=Step-1, nlgeom=YES
*Dynamic, Explicit
, 0.5
*Bulk Viscosity
0.06, 1.2
**
** BOUNDARY CONDITIONS
**
*Boundary
BASE-RP, 1, 1
BASE-RP, 2, 2
BASE-RP, 3, 3
BASE-RP, 4, 4
BASE-RP, 5, 5
BASE-RP, 6, 6
**
*Boundary, amplitude=AMP-1
LEFT-RP, 1, 1, 10.
LEFT-RP, 2, 2
LEFT-RP, 3, 3
LEFT-RP, 4, 4
LEFT-RP, 5, 5
LEFT-RP, 6, 6
**
*Boundary, amplitude=Amp-1
RIGHT-RP, 2, 2
RIGHT-RP, 3, 3
RIGHT-RP, 4, 4
RIGHT-RP, 5, 5
RIGHT-RP, 6, 6
**
** OUTPUT REQUESTS
**
*Restart, write, number interval=1, time marks=NO
**
** FIELD OUTPUT: F-Output-1
**
*Output, field, variable=PRESELECT, number interval=25
**
** HISTORY OUTPUT: H-Output-2
**
*Output, history, time interval=0.001
*Node Output, nset=LEFT-RP
RF1, RF2, RF3, RM1, RM2, RM3, U1, U2
U3, UR1, UR2, UR3
**
** HISTORY OUTPUT: H-Output-1
**
*Output, history, variable=PRESELECT
*End Step
**
** Step 2
*Step, name=Step-2, nlgeom=YES
*Dynamic, Explicit
, 0.5
*Bulk Viscosity
0.06, 1.2
**
** BOUNDARY CONDITIONS
**
*Boundary, op=NEW
BASE-RP, 1, 1
BASE-RP, 2, 2
BASE-RP, 3, 3
BASE-RP, 4, 4
BASE-RP, 5, 5
BASE-RP, 6, 6
**
*Boundary, op=NEW, amplitude=AMP-1
LEFT-RP, 2, 2
LEFT-RP, 3, 3
LEFT-RP, 4, 4
LEFT-RP, 5, 5
LEFT-RP, 6, 6
**
*Boundary, op=NEW, amplitude=AMP-1
RIGHT-RP, 1, 1, -10.
RIGHT-RP, 2, 2
RIGHT-RP, 3, 3
RIGHT-RP, 4, 4
RIGHT-RP, 5, 5
RIGHT-RP, 6, 6
**
** OUTPUT REQUESTS
**
*Restart, write, number interval=1, time marks=NO
**
** FIELD OUTPUT: F-Output-1
**
*Output, field, variable=PRESELECT, number interval=25
**
** HISTORY OUTPUT: H-Output-2
**
*Output, history, time interval=0.001
*Node Output, nset=RIGHT-RP
RF1, RF2, RF3, RM1, RM2, RM3, U1, U2
U3, UR1, UR2, UR3
**
** HISTORY OUTPUT: H-Output-1
**
*Output, history, variable=PRESELECT
*End Step
